/NOPR
KEYW,PR_SET,1
KEYW,PR_STRUC,1
KEYW,LSDYNA,1
KEYW,PR_DYNA,1
/CWD,'C:\Users\Cliff\Desktop\tmp\3D_fibre\3D_fibres'

PI = acos(-1)
r = 1.5	!spiral fibre rotation radius (mm)
S = 10	!spiral fibre pitch (mm)
n = 8	!division in single pitch (from 1/4 hollow cylindar, minus 3 overlapped nodes)
P_d = n*1.0   !total sub-pitch number (P_d must be an integer), the same as total node number in one fibre
P_num = P_d/n	!spiral fibre total pitch number
theta = P_num*360	!spiral fibre total rotation angle (DEG)
bargin = r*0.1  !bargin from fibre to outer cylindar (mm)
K_num = P_num*n+1	!total node number in one spiral fibre
L_num = K_num-1 !total element number in one spiral fibre
ef_size = 2 !element size for fibre (mm)
ec_size = 2 !element size for cylindar (mm)
r_beam = 0.56   !radius of fibre section (mm)
f_num = 2	!number of fibres

/VIEW,1,1,1,1
/ANG,1
/REP,FAST

/PREP7
ET,1,SOLID164
ET,2,LINK160
R,1,r_beam,  !section area for fibre
MP,DENS,1,0.0024    !material properties
MP,EX,1,2e4
MP,NUXY,1,0.2
MP,DENS,2,0.0078
MP,EX,2,2e5
MP,NUXY,2,0.28
*DIM,F_NODES,ARRAY,f_num*P_d+1,1,1, , ,   !fibre nodes for 1D contact
*DIM,C_NODES,ARRAY,f_num*P_d+1,1,1, , ,   !concrete nodes for 1D contact

*DIM,CS_trans,ARRAY,f_num,3,1, , ,   !read CS transmissions
*VREAD,CS_trans,'CS_trans','txt',,JIK,3,f_num,1, ,
(3F12.5)
*DIM,CS_rotat,ARRAY,f_num,3,1, , ,   !read CS rotations
*VREAD,CS_rotat,'CS_rotat','txt',,JIK,3,f_num,1, ,
(3F12.5)

*DO,i,1,f_num,1	!draw hollow cylindars and fibres
	wpof,CS_trans(i,1,1),CS_trans(i,2,1),CS_trans(i,3,1)
	wpro,CS_rotat(i,1,1),CS_rotat(i,2,1),CS_rotat(i,3,1)
	CSWPLA,11,0,1,1,	!temporary Cartesian coordinate system
	CSWPLA,12,1,1,1,	!temporary Cylindrical coordinate system

	CSYS,11,
	CYL4, , ,r+bargin,0,r,90,S*P_num   !draw hollow cylindar with bargins
	VATT,1,1,1,       0
	*GET,ii,LINE,0,NUM,MAX !ii for temporarily storing maximum line number
	LESIZE,ii-6, , ,1, , , , ,1
	LESIZE,ii-5, , ,n/4, , , , ,1
	LESIZE,ii-3, , ,P_d, , , , ,0
	*GET,ii,VOLU,0,NUM,MAX !ii for temporarily storing maximum volumn number
	VSWEEP,ii
	VSYMM,X,ii, , , ,0,0
	VSYMM,Y,ii, , , ,0,0
	VSYMM,Y,ii+1, , , ,0,0
	NUMMRG,ALL, , , ,LOW
	NUMCMP,ALL

	*GET,ii,NODE,0,NUM,MAX !ii for temporarily storing maximum node number
	CSYS,12
	*DO,j,1,P_d+1,1 !draw nodes for single fibre
	    NSEL,S,LOC,X,r
	    theta1=360*(j-1)/n-360/n/3
	    theta2=360*(j-1)/n+360/n/3
	    NSEL,R,LOC,Y,theta1,theta2
	    gama1=S/n*(j-1)-S/n/4
	    gama2=S/n*(j-1)+S/n/4
	    NSEL,R,LOC,Z,gama1,gama2
	    *GET,ijk,NODE,0,NUM,MIN
	    *SET,C_NODES((i-1)*P_d+j,1,1),ijk
	    *GET,iii,NODE,ijk,LOC,X
	    *GET,jjj,NODE,ijk,LOC,Y
	    *GET,kkk,NODE,ijk,LOC,Z
	    N,,iii,jjj,kkk
		*GET,i_max,NODE,0,NUM,MAX	!i_max for temporarily storing maximum node number
		*SET,F_NODES((i-1)*P_d+j,1,1),i_max
	    ALLSEL,ALL
	*ENDDO

	CSYS,11
	TYPE,2
	MAT,2
	REAL,1
	ESYS,0
	SECNUM,
	*DO,j,1,P_d,1   !draw beam elements for single fibre
	    E,ii+j,ii+j+1
	*ENDDO
	NUMMRG,ALL, , , ,LOW
	NUMCMP,ALL
	WPCSYS,-1,0
*ENDDO

!!!!F_nodes number is not correct!!!!
*DO,i,1,f_num*(P_d),1 !concrete nodes for 1D contact
    *SET,j,C_NODES(i,1,1)
    *IF,i,eq,1,then
        NSEL,S,,,j
    *ELSE
        NSEL,A,,,j
    *ENDIF
*ENDDO
CM,C_NODES,NODE
CMSEL,A,C_NODES
ALLSEL,ALL

*DO,i,1,f_num*(P_d),1 !fibre nodes for 1D contact
    *SET,j,F_NODES(i,1,1)
    *IF,i,eq,1,then
        NSEL,S,,,j
    *ELSE
        NSEL,A,,,j
    *ENDIF
*ENDDO
CM,F_NODES,NODE
CMSEL,A,F_NODES
ALLSEL,ALL

!ESEL,S,MAT,,2   !fibre nodes for 1D contact
!NSLE,S
!CM,F_NODES,NODE
!CMSEL,A,F_NODES
!ALLSEL,ALL

!*DIM,load,ARRAY,3,1,1, , ,
!*SET,LOAD(2,1,1) ,0.1
!*SET,LOAD(3,1,1) ,0.1
!*DIM,time,ARRAY,3,1,1, , ,
!*SET,TIME(2,1,1) , 1
!*SET,TIME(3,1,1) , 5
!EDLOAD,ADD,FX,0,C_NODES,TIME,LOAD, 0, , , , ,
!EDLOAD,ADD,FY,0,F_NODES,TIME,LOAD, 0, , , , ,
!DA,1,ALL,
!DA,7,ALL,
!DA,13,ALL,
!DA,19,ALL,
!
!ASEL,R,LOC,Z,S*P_num
!NSLA,S,1
!CM,LOAD,NODE
!CMSEL,A,LOAD
!EDLOAD,ADD,FZ,0,LOAD,TIME,LOAD, 0, , , , ,
!ALLSEL,ALL
!
!FINISH
!/SOL
!TIME,3,
!EDRST, ,0.1,
!EDHTIME, ,0,
!EDDUMP, ,0,
!EDWRITE,LSDYNA,'tmp','k',' '
